*Heading
** Job name: Design_Job0 Model name: Model-1
** Generated by: Abaqus/CAE 2017
*Preprint, echo=NO, model=NO, history=NO, contact=NO
**
** PARTS
**
*Part, name=Part-1
*Node
      1,          40.,          20.
      2,          40.,           0.
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*Element, type=CPS4R
   1,    1,   10,  499,  165
   2,   10,   11,  500,  499
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*Elset, elset=ss, generate
    1,  6400,     1
** Section: sldSec
*Solid Section, elset=ss, material=Material01
,
*End Part
**
**
** ASSEMBLY
**
*Assembly, name=Assembly
**
*Instance, name=Part-1-1, part=Part-1
*End Instance
**
*Nset, nset=_PickedSet4, internal, instance=Part-1-1
   7,   8, 263, 264, 265, 266
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*Elset, elset=_PickedSet4, internal, instance=Part-1-1, generate
 2401,  2440,     1
*Nset, nset=_PickedSet5, internal, instance=Part-1-1
 4,
*End Assembly
**
** MATERIALS
**
*Material, name=Material01
*Elastic
1., 0.3
*Material, name=Material02
*Elastic
 1e-09, 0.3
**
** BOUNDARY CONDITIONS
**
** Name: BC-1 Type: Displacement/Rotation
*Boundary
_PickedSet4, 1, 1
_PickedSet4, 2, 2
** ----------------------------------------------------------------
**
** STEP: Step-1
**
*Step, name=Step-1, nlgeom=NO
*Static
1., 1., 1e-05, 1.
**
** LOADS
**
** Name: Load-1   Type: Concentrated force
*Cload
_PickedSet5, 2, -1.
**
** OUTPUT REQUESTS
**
*Restart, write, frequency=0
**
** FIELD OUTPUT: SEDensity
**
*Output, field
*Element Output, directions=YES
ELEDEN,
**
** FIELD OUTPUT: F-Output-1
**
*Output, field, variable=PRESELECT
**
** HISTORY OUTPUT: ExtWork
**
*Output, history
*Energy Output
ALLWK,
**
** HISTORY OUTPUT: H-Output-1
**
*Output, history, variable=PRESELECT
*End Step
